# AguaClara Water Treatment Plants
# Automated Design
# User Inputs:
# Design References
# [reference: userinputs.xmcd]
# [reference: DesignAssumptions.xmcd]
# [reference: PipeDatabase.xmcd]
# [reference: Minor loss coefficients.xmcd]
# [reference: FluidsFunctions.xmcd]
# [reference: Channel.xmcd]
W_Channel = 0.199786 m
L_Channel = 3.45 m
ND_SedPipeEntrance = 6 in
# [reference: Sedimentation.xmcd]
H_SedBelowSlope = 0.866025 m
H_SedBelowStraight = 0.133975 m
H_SedAbove = 0.25 m
H_SedPlate = 0.779423 m
HW_SedTank = 2.02942 m
V_SedC = 11.3711 m/day
L_SedTankActive = 3.096 m
L_SedTank = 3.546 m
ND_LaunderEstimated = 4 in
N_SedPlate = 45
H_SedTank = 2.12942 m
Z_Mp = 1.42942 m
# [reference: FCM.xmcd]
N_Fcm = 2
ID_FcmTube = 0.125 in
ID_FcmTube = 3.175 mm
L_FcmTube = 116.725 cm
Q_FcmTubeMax = 241.875 mL/min
HL_FcmValve = 4.31402 cm
# [reference: Flocculation.xmcd]
# [reference: EntranceTank.xmcd]
ND_Lfom = 6 in
HL_Rm = 12.0621 cm
N_Lfom = 2
D_LfomOrifice = 1.7 cm
N_LfomOrifices = [5; 4; 3; 2; 3; 1; 1; 2; 1; 2]
Q_LfomErrorMax = 1.37663 %
L_Et = 1.04775 m
W_Et = 1.04775 m
HW_Et =  # error: This variable is undefined.
H_Et =  # error
# [reference: plantleveltank.xmcd]
# [reference: Sludge Drain.xmcd]
# [reference: Launder.xmcd]
# [reference: Elevations.xmcd]
# AutoCAD References
# [reference: basics.xmcd]
# [reference: inputs.xmcd]
# [reference: tank.xmcd]
# [reference: lamina.xmcd]
# [reference: cross.xmcd]
# [reference: Tee.xmcd]
# [reference: elbow.xmcd]
# [reference: pipe.xmcd]
# [reference: pipe.no_zoom.xmcd]
# [reference: Sludge.xmcd]
# [reference: Channel.xmcd]
# [reference: Manifold.xmcd]
# [reference: SedTankslopes.xmcd]
# [reference: floctank.xmcd]
# [reference: EntranceTank.xmcd]
# [reference: platform.xmcd]
# [reference: PlantLevelTank.xmcd]
# [reference: SedTank.xmcd]
# [reference: stocka.xmcd]
# [reference: stockb.xmcd]
