# AguaClara Design Tool
Ti_wanted := 5 min
Q_Plant =  # error: This variable is undefined.
# [reference: BasicClientInputs.xmcd]
# [reference: ExpertInputs.xmcd]
# [reference: DesignAssumptions.xmcd]
# [reference: MathFunctions.xmcd]
# [reference: PipeDatabase.xmcd]
# [reference: MinorLossCoefficients.xmcd]
# [reference: FluidsFunctions.xmcd]
# [reference: Sedimentation Tank.xmcd]
# [reference: Floc Hopper - New Design.xmcd]
# [reference: FCM.xmcd]
# [reference: Flocculator 3.xmcd]
# [reference: Rapid Mix.xmcd]
# [reference: Materials List.xmcd]
# [reference: ChemStorageCylinders.xmcd]
# [reference: Chemical Doser.xmcd]
# [reference: AutoCADMasterProgram.xmcd]
Q_Plant = 20 L/s
AC_FlocTank = [
    "-layer m floctank";
    "c t 91,91,91";
    "floctank";
    "  ";
    "_-view o t _zoom w 0.16,4.38,0 -6.22869,7.27,1.90989 _box 0,4.54,0 -6.06869,7.11,1.90989 _box 0.15,4.39,-0.15 -6.21869,7.26,1.90989 _subtract 0.15,4.39,-0.15  0,4.54,0 ";
    "_box -6.21869,5.07,0 0.15,5.22,1.90989";
    "_box -0.24928,5.07,0.53 0,5.22,0";
    "_subtract -6.21869,5.07,0  -0.24928,5.07,0.53 ";
    "_box -6.21869,5.75,0 0.15,5.9,1.90989";
    "_box -6.06869,5.75,0.53 -5.81941,5.9,0"
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]
AC_SedTank =  # no stored result
AC_ChemTanks = ["-layer m alumtanks"; "c t 132,132,132"; "alumtanks"; "  "; "_-view o t"; "_cylinder 2.09057,5.7204,2.73398 0.5396 1.60881"; "_cylinder 2.09057,5.7204,2.73898 0.5346 1.60381"; "_-view o t"; "_subtract 1.55097,5.7204,2.73398  1.55597,5.7204,2.73398 "; "_mirror all  2.08057,5.1308 2.10057,5.1308 "; "_union all "; "-layer s 0"; "  "; "-layer f alumtanks"; "  "]
AC_EntranceTank = [
    "-layer m entrancetank"; "c t 214,214,214"; "entrancetank"; "  "; "_-view o t _zoom w 3.04114,7.1,1.13159 1.14,9.00114,2.13398 _box 2.88114,7.26,1.13159 1.3,8.84114,2.13398 _box 3.03114,7.11,0.98159 1.15,8.99114,2.13398 _subtract 3.03114,7.11,0.98159  2.88114,7.26,1.13159 "; "-layer s 0"; "  "; "-layer f entrancetank"; "  "; "-layer s entrancetank"
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]
