# AguaClara Water Treatment Plants
# Design References
# MathCAD dimension calculations:
# Variable Naming Guide
# The list below is the list names that can be used before the period for the subscript in our variable names.
# Major Plant Components. These items follow the period in the variable name
# [reference: BasicInputs.xmcd]
# [reference: ExpertInputs.xmcd]
# [reference: MathFunctions.xmcd]
# [reference: PipeDatabase.xmcd]
# [reference: FluidsFunctions.xmcd]
# [reference: SedimentationTank.xmcd]
[
    "Subscripts", "";
    "component key", "Description";
    "Et", "Entrance tank";
    "Lfom", "Linear flow orifice meter";
    "Rm", "Rapid mix";
    "Floc", "Flocculation tank";
    "Sed", "Sedimentation tank";
    "Fi", "Stacked Rapid Sand Filter"
]
# [reference: Flocculator.xmcd]
# [reference: LFOM.xmcd]
# [reference: LinearCdc.xmcd]
# [reference: ChemStorageTanks.xmcd]
# [reference: EntranceTank.xmcd]
# [reference: StackedRapidSandFilter.xmcd]
# [reference: DrainChannel.xmcd]
# [reference: MaterialsList.xmcd]
# AutoCAD drawing programs:
# Translators:
# These are the codes that take MathCAD outputs and create AutoCAD scripts that are used to draw the plant (formerly Basics)
# [reference: MtoATranslators.xmcd]
# The wrapped MtoA translator contains the functions that the user will want to access. These functions will draw pieces with full functionality - specifying the location, dimension, and orientation of the object. Also, it contains layer control and subtraction capabilities for grouped objects.
# [reference: MtoATranslatorsWrapped.xmcd]
[
    "Symbol", "Description", "Dimensions";
    "Amp", "amplitude", "L";
    "B", "perpendicular distance between components (center to center)", "L";
    "D", "Diameter", "L";
    "E", "pipe roughness", "L";
    "FB", "Freeboard", "L";
    "H", "height (includes freeboard)", "L";
    "HL", "head loss", "L";
    "HW", "local water depth", "L";
    "ID", "inner diameter", "L";
    "L", "length", "L";
    "Loc", "Locations", "L";
    "ND", "nominal diameter", "L";
    "OD", "outer diameter", "L";
    "R", "Radius", "L";
    "S", "space between components", "L";
    "T", "thickness", "L";
    "W", "width", "L";
    "Z", "elevation relative to bottom of sed tank", "L";
    "ZW", "water depth relative to bottom of sed tank", "L";
    "V", "velocity", "L/T";
    "CP", "Collision Potential", "L^(2/3)";
    "A", "Area", "L^2";
    "Nu", "kinematic viscosity", "L^2/T";
    "ED", "energy dissipation rate", "L^2/T^3";
    "Vol", "volume", "L^3";
    "Q", "flow", "L^3/T";
    "MW", "Molecular weight", "M";
    "C", "Concentration", "M/L^3";
    "Rho", "Density", "M/L^3";
    "AN", "angle", "radians";
    "Ti", "time", "T";
    "EN", "Enumerated type", "dimensionless";
    "N", "Number", "dimensionless";
    "Pi", "dimensionless geometric ratio", "";
    "AC", "AutoCAD command string", "";
    "K", "minor loss coefficient", ""
]
# Plant Elements:
# These are all of the files that draw the fundamental parts of the plants (tees, elbows, tanks, pipes, etc)
# [reference: ChannelF.xmcd]
# [reference: PlumbingF.xmcd]
# [reference: TankF.xmcd]
# [reference: StairsF.xmcd]
# [reference: DrainChannelF.xmcd]
# Specific Pieces:
# These are the codes that draw the bigger pieces of the plant (the sed tank, floc tank, etc)
# [reference: FlocculatorAC.xmcd]
# [reference: SedimentationTankAC.xmcd]
# [reference: EntranceTankAC.xmcd]
# [reference: ChemStockTanksAC.xmcd]
# [reference: StackedRapidSandFilterAC.xmcd]
# [reference: OperatorAccessAC.xmcd]
# [reference: DrainChannelAC.xmcd]
# Layouts:
# This rearranges the plant to optimize the layout
# [reference: PlantLayoutsAC.xmcd]
# This file will execute at the very end to create multiple views of the entire plant in paperspace
# [reference: LayoutsAC.xmcd]
# Sedimentation
# Sed Tanks and Slopes:
N_SedTanks = 3
L_Sed = 3.56117 m
N_SedBays = 2  # Number of bays of inlet manifolds in each sed tank
# Length of the port through which water exits the inlet manifold
# Width of ferrous cement plates in whice one manifold port is cut
Q_SedBay = 3 L/s
# Sedimentation Tank Sludge Drain:
N_SedSludgeOrifices = 24  # per cell
Ti_SludgeDrain = 30 min  # Tank Drain time
W_SedSludge = 6.71293 cm  # Width of the sludge channel
B_SedSludgeOrifices = 10.693 cm  # Distance center to center between drain orifices
# Depth of the sludge channel
H_SedSludge = 6.71293 cm
W_SedDrainCover = 11.43 cm
D_SedSludgeOrifice = 0.00980191 m  # Diameter of drain orifices
N_SedSludgeOrifices = 24
# Sedimentation Tank Dimensions:
Z_SedSludge = 0.0671293 m  # Height from 0 of the top of the sludge drain
# Height from 0 of the top of the inlet manifold
W_Sed = 2 m
L_Sed = 3.56117 m  # Total tank length
# Inlet Channel:
HW_SedInletChannel = 0.303588 m  # Width of the drop chimneys connecting channel to sed inlet manifolds
W_SedInletChannel = 0.44415 m  # length of drop chimmneys
L_SedChannel = 6.3 m
H_SedInletChannel = 0.403588 m
# Sedimentation Tank Effluent Launder:
N_SedLaunderOrifices = 46  # Number of orifices per launder  # More Launder Dimensions
ND_SedLaunder = 4 in
Q_SedLaunderOrifices = 6.52174e-5 m^3/s
# Center to center launder spacing
L_SedLaunder = 2.5082 m
B_SedLaunderOrifices = 0.1 m
D_SedLaunderOrifice = 0.472441 in
# Exit Channel:
W_SedExitChannel = 0.250875 m
H_SedExitChannel = 0.403588 m
HW_SedExitChannel = 0.263588 m  # water height in exit channel from 0
# Lamella:
L_SedPlate = 0.75 m  # center to center distance between lamella
B_SedPlate = 2.7 cm  # spacing between lamella
S_SedPlate = 2.5 cm
N_SedPlates = 81  # Number of Sed Plates per Sedimentation Tank Bay.
AN_SedPlate = 60 deg
V_SedC = 10.3528 m/day
L_SedActive = 2.52302 m
V_SedUp = 86.4 m/day
Z_SedLaunder = 1.86052 m
N_SedPlates = 81
HW_Sed = 1.96039 m
H_Sed = 2.07117 m
# Flocculator
# Look at Flocculator Positioning arrays
W_FlocChannel = 0.6 m
# Fill last channel with bafffles from last channel
ED_Floc = 10 mW/kg
# Fix port width to be based on energy dissipation in that channel
# Adjust spacing after the number of baffles per channel is known.
HW_FlocEnd = 1.96039 m
# Check the residence time of the flocculator should be at least 20minutes
X_FlocBaffles = [
    0.213732, 0.213732, 0.213732, 0.213732, 0.213732, 0.213732;
    0.409464, 0.409464, 0.409464, 0.409464, 0.409464, 0.409464;
    0.605196, 0.605196, 0.605196, 0.605196, 0.605196, 0.605196;
    0.800927, 0.800927, 0.800927, 0.800927, 0.800927, 0.800927;
    0.996659, 0.996659, 0.996659, 0.996659, 0.996659, 0.996659;
    1.19239, 1.19239, 1.19239, 1.19239, 1.19239, 1.19239;
    1.38812, 1.38812, 1.38812, 1.38812, 1.38812, 1.38812;
    1.58385, 1.58385, 1.58385, 1.58385, 1.58385, 1.58385;
    1.77959, 1.77959, 1.77959, 1.77959, 1.77959, 1.77959;
    1.97532, 1.97532, 1.97532, 1.97532, 1.97532, 1.97532;
    2.17105, 2.17105, 2.17105, 2.17105, 2.17105, 2.17105;
    2.36678, 2.36678, 2.36678, 2.36678, 2.36678, 2.36678;
    2.56251, 2.56251, 2.56251, 2.56251, 2.56251, 2.56251;
    2.75825, 2.75825, 2.75825, 2.75825, 2.75825, 2.75825;
    2.95398, 2.95398, 2.95398, 2.95398, 2.95398, 2.95398;
    3.14971, 3.14971, 3.14971, 3.14971, 3.14971, 3.14971;
    3.34544, 3.34544, 3.34544, 3.34544, 3.34544, 0
] m
L_FlocBaffles = [
    1.66979, 1.66979, 1.66979, 1.66979, 1.66979, 1.98143;
    1.98143, 1.98143, 1.98143, 1.98143, 1.98143, 1.66979;
    1.66979, 1.66979, 1.66979, 1.66979, 1.66979, 1.98143;
    1.98143, 1.98143, 1.98143, 1.98143, 1.98143, 1.66979;
    1.66979, 1.66979, 1.66979, 1.66979, 1.66979, 1.98143;
    1.98143, 1.98143, 1.98143, 1.98143, 1.98143, 1.66979;
    1.66979, 1.66979, 1.66979, 1.66979, 1.66979, 1.98143;
    1.98143, 1.98143, 1.98143, 1.98143, 1.98143, 1.66979;
    1.66979, 1.66979, 1.66979, 1.66979, 1.66979, 1.98143;
    1.98143, 1.98143, 1.98143, 1.98143, 1.98143, 1.66979;
    1.66979, 1.66979, 1.66979, 1.66979, 1.66979, 1.98143;
    1.98143, 1.98143, 1.98143, 1.98143, 1.98143, 1.66979;
    1.66979, 1.66979, 1.66979, 1.66979, 1.66979, 1.98143;
    1.98143, 1.98143, 1.98143, 1.98143, 1.98143, 1.66979;
    1.66979, 1.66979, 1.66979, 1.66979, 1.66979, 1.98143;
    1.98143, 1.98143, 1.98143, 1.98143, 1.98143, 1.66979;
    1.66979, 1.66979, 1.66979, 1.66979, 1.66979, 0
] m
Z_FlocBaffles = [
    0, 0, 0, 0, 0, 0.290598;
    0.290598, 0.290598, 0.290598, 0.290598, 0.290598, 0;
    0, 0, 0, 0, 0, 0.290598;
    0.290598, 0.290598, 0.290598, 0.290598, 0.290598, 0;
    0, 0, 0, 0, 0, 0.290598;
    0.290598, 0.290598, 0.290598, 0.290598, 0.290598, 0;
    0, 0, 0, 0, 0, 0.290598;
    0.290598, 0.290598, 0.290598, 0.290598, 0.290598, 0;
    0, 0, 0, 0, 0, 0.290598;
    0.290598, 0.290598, 0.290598, 0.290598, 0.290598, 0;
    0, 0, 0, 0, 0, 0.290598;
    0.290598, 0.290598, 0.290598, 0.290598, 0.290598, 0;
    0, 0, 0, 0, 0, 0.290598;
    0.290598, 0.290598, 0.290598, 0.290598, 0.290598, 0;
    0, 0, 0, 0, 0, 0.290598;
    0.290598, 0.290598, 0.290598, 0.290598, 0.290598, 0;
    0, 0, 0, 0, 0, 0
] m
N_FlocChannels = 6
L_FlocTank = 21.367 m
HL_Floc = 26.164 cm
HW_FlocStart = 2.22203 m
S_FlocBaffle = [19.3732; 19.3732; 19.3732; 19.3732; 19.3732; 19.3732] cm
B_FlocBaffle = [19.5732; 19.5732; 19.5732; 19.5732; 19.5732; 19.5732] cm
N_FlocChannelBaffles = [17; 17; 17; 17; 17; 16]
W_FlocPort = [0.193732; 0.193732; 0.193732; 0.193732; 0.193732; 0.193732] m
HL_FlocChannels = [4.40141; 4.40141; 4.40141; 4.40141; 4.40141; 4.15689] cm
L_FlocBaffleLower = 1.66979 m
L_FlocBaffleUpper = 1.98143 m
H_FlocPort = [0.6; 0.6; 0.6; 0.6; 0.6; 0.6] m
Ti_Floc = 23.271 min  # residence time of the flocculator
N_FlocBaffles = 101
# Materials List
N_Valves = 6
N_ValveCouplings = 6
N_SedPlatesTotal = 486
N_SedPlatesPerSheet = 4
N_SedPlateSheets = 122
# AutoCAD Scripts
AC_SedTank =  # no stored result
AC_EntranceTank =  # no stored result
AC_FlocTank =  # no stored result
AC_ChemTanks = [
    "-layer m CoagTanks"; "c t 132,132,132"; "CoagTanks"; "  "; "_-view o t"; "_zoom w -4.97492,12.44,1.71734 -4.33532,13.0796,2.96154"; "_cylinder -4.65512,12.7598,2.95154 0.3098 a -5.87932,12.7598,2.95154"; "rotate3d l  y -4.65512,12.7598,2.95154 90"; "-group c CoagTanks y "; "all "
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]
AC_OperatorAccess = [
    "-layer m OpWalkwayCon"; "c t 132,132,132"; "OpWalkwayCon"; "  "; "_-view o f"; "_pline"; "-6.38452,2.95154"; "-6.08452,2.95154"; "-6.08452,2.75435"; "-5.78452,2.75435"
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]
AC_DrainChannel = [
    "-layer m DrainChannel"; "c t 214,214,214"; "DrainChannel"; "  "; "3dpoly"; "0.2,12.3,1.20758"; "0.2,12.3,0.82637"; "0.2,13.06244,0.82637"; "0.2,13.06244,1.20758"; "0.2,12.3,1.20758 "
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]
AC_Layout = [
    "laythw"; "-layout t AguaClara 0"; "View"; "layout d Layout1"; " d Layout2"; "layout r View"; "TopView"; "layout s TopView"; ".ms"; "z o all "
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]
AC_Filter =  # no stored result
# [component: inputs stack(AC_EntranceTank, AC_SedTank, AC_FlocTank, AC_DrainChannel)]
