# AguaClara Water Treatment Plants
# Automated Design
# References
# Here we will reference the subprograms: Unit Processes, Hydraulic Design, AutoCAD?, and Report Generator?. In order to be able to transfer data from one subprogram to another we will need to be able to send and recieve everything through function calls.
# [reference: HydraulicDesign.xmcd]
# [reference: UnitProcesses.xmcd]
# Enter Values Here:
# Choose either a Pipe Schedule Number or an SDR rating:
# [component: outputs PipeSpecification]
# Engineer Entered Values:
# Tamara plant flow rate = 740 L/min.
Q_plant := 740*L/min
tank_thick := 20 cm
walkway_width := 1 m
lvltank_thick := 20 cm
FlocTank_width := .8 m
stockplat_thick := lvltank_thick
SedTank_width := FlocTank_width
grit_thick := lvltank_thick
r_drum := .3 m
platform_thick := .5 m
h_drum := .7 m
channel_thick := 10 cm
drum_disp := 6 in
column_dim := [2; 2; .8]*m
stockplatcol_dim := [20; 20; 120]*cm
DataDump1 := UnitProcess(Q_plant, SedTank_width, FlocTank_width, r_drum, h_drum)
# convert stuff returned by unit process to stuff needed by hydraulic design, etc.
UnitProcess(Q_plant, SedTank_width, FlocTank_width, r_drum, h_drum)
# The function UnitProcess doesn't exist anymore. Individual Files in the Subprograms are going to be called.
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DataDump1 =  # error: This variable is undefined.
DataDump1[2] =  # error
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Laund := Launder(Q_plant, PipeSpecification)
SludgePipe := Sludge(Q_plant, PipeSpecification)
ChannelDim := Channel(DataDump1[3], tank_thick, channel_thick)
Grit := gritchamber(Q_plant, r_drum, PipeSpecification)
LvlTank := PlantLevelingTank(Q_plant, PipeSpecification)
PlantElevation := PlantElevationDesign(Q_plant, DataDump1[1], DataDump1[0], DataDump1[3])
# Calls Functions Here:
headerrow := ["Parameter"; "Value"; "Units"]
headercolumn := [
    "Number of Sedimentation Tanks";
    "Lamella Spacing in Sedimentation Tank";
    "Baffle Spacing 1 in Flocculator";
    "Height of Inlet Pipe into Flocculator";
    "Number of baffles in Flocculator Section 1";
    "Water level in Plant";
    "Depth of Manifold";
    "Diameter of orifices in";
    "Number of holes in risers in grit chamber";
    "Inner Radius of Waste pipe";
    "Inner Radius of Effluent pipe";
    "Length of Sed. Pipe";
    "Waterlevel in plant leveling tank";
    "Wall Displacement";
    "Orifice spacing?"
]
Units := ["meter"; " "; "meter"; "meter"; " "; "meter"; "meter"; "meter"; "meter"; " "; "meter"; "meter"; "meter"; "meter"; "meter"; "meter"]
Z := [
    DataDump1[1];
    DataDump1[2];
    DataDump1[4][0];
    DataDump1[5];
    DataDump1[6][0];
    PlantElevation;
    Laund[:, 3];
    Laund[:, 1];
    Grit[:, 2];
    SludgePipe[:, 0];
    LvlTank[:, 3];
    Laund[:, 0];
    LvlTank[:, 0];
    LvlTank[:, 1];
    Laund[:, 2]
]
length(headercolumn) = 15
length(Z) =  # error
table(headerrow, headercolumn, Z) :=
    for i ∈ 0 .. length(headercolumn)
        for j ∈ 0 .. last(headerrow)
            table[i, j] ← headerrow[j] if i == 0
            otherwise
                table[i, j] ← headercolumn[i - 1] if j == 0
                table[i, j] ← Z[i - 1] if j == 1
                table[i, j] ← Units[i - 1] if j == 2
    return table
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headercolumn_Dim := [" Sedimentation Tank"; "Dimensions of Flocculator"; "Dimensions of Grit Chamber"; "Dimensions of Leveling Tank"; "Dimensions of Channel"]
headerrow_Dim := ["Component"; "Length"; "Width"; "Height"; "Units"]
Dim_y := [DataDump1[0][1]; DataDump1[3][1]; 5; Grit[:, 1][0][1]; ChannelDim[1]]
Dim_z := [DataDump1[0][2]; DataDump1[3][2]; 5; Grit[:, 1][0][2]; ChannelDim[2]]
Dim_x := [DataDump1[0][0]; DataDump1[3][0]; 5; Grit[:, 1][0][0]; ChannelDim[0]]
Units2 := ["meter"; "meter"; "meter"; "meter"; "meter"]
tableDim(headerrow_Dim, headercolumn_Dim, Dim_x, Dim_y, Dim_z, Units2) :=
    for i ∈ 0 .. length(headercolumn_Dim)
        for j ∈ 0 .. last(headerrow_Dim)
            tableDim[i, j] ← headerrow_Dim[j] if i == 0
            otherwise
                tableDim[i, j] ← headercolumn_Dim[i - 1] if j == 0
                tableDim[i, j] ← Dim_x[i - 1] if j == 1
                tableDim[i, j] ← Dim_y[i - 1] if j == 2
                tableDim[i, j] ← Dim_z[i - 1] if j == 3
                tableDim[i, j] ← Units[i - 1] if j == 4
    return tableDim
# Constructing Table:
# Table of Parameters:
# top
# [component: inputs table(headerrow, headercolumn, Z)]
# [component: inputs tableDim(headerrow_Dim, headercolumn_Dim, Dim_x, Dim_y, Dim_z, Units2)]
